<?xml version="1.0"?>

<turboprop_engine name="Magnussen_KE-76">
  <milthrust unit="LBS">0</milthrust>
  <idlen1>65.0</idlen1>
  <maxn1>100.0</maxn1>
  <maxpower unit="HP">1970</maxpower>
  <psfc unit="LBS/HR/HP">0.44</psfc>
  <n1idle_max_delay>2</n1idle_max_delay>
  <maxstartingtime>3</maxstartingtime>
  <startern1>65</startern1>
  <ielumaxtorque unit="FT*LB">3950</ielumaxtorque>
  <itt_delay>0.15</itt_delay>
  <betarangeend>64</betarangeend>
  <reversemaxpower>0</reversemaxpower>

	<function name="EnginePowerVC">
		<table>
			<description> Engine power, function of ram air </description>
			<independentVar lookup="row">aero/qbar-psf</independentVar>
				<tableData>
					0		1
					10		1.1
				</tableData>
		</table>
	</function>

	<table name="EnginePowerRPM_N1" type="internal">
		<description> Engine Power, function of Engine RPM(N2) and Throttle setting(N1) </description>
			<tableData>
						0		60		70		80		90		95		100
				0		0.0		0.5		0.5		0.5		0.5		0.5		0.5
				500		0.0		15.4	30.8	61.6	123.1	246.3	492.5
				7500	0.0		30.8	61.6	123.1	246.3	492.5	985.0
				10000	0.0		61.6	123.1	246.3	492.5	985.0	1970.0
			</tableData>
	</table>

	<table name="ITT_N1" type="internal">
		<description> Inter-Turbine Temperature ITT [deg C] depending on N1 and engine run (0=off / 1=running) </description>
			<tableData>
						0		1
				0		0		0
				25		75		200
				50		150		400
				100		300		800
			</tableData>
	</table>

	<table name="CombustionEfficiency_N1" type="internal">
		<description> Burn Efficiency, function of Throttle setting(N1) </description>
			<tableData>
				0		0.2
				65		0.85
				75		0.90
				85		0.94
				90		0.97
				95		0.99
				100		1.0
			</tableData>
	</table>

</turboprop_engine>
